**
** Heading +++++++++++++++++++++++++++++++++++++++++++++++++
**
*Heading
Hash: yhNVwU6Q, Date: 10/07/2025, Unit system: M_KG_S_C
**
** Nodes +++++++++++++++++++++++++++++++++++++++++++++++++++
**
*Node
1, 0.00000000E+000, -1.00000000E-002, -5.00000000E-003
2, 0.00000000E+000, 1.00000000E-002, -5.00000000E-003
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**
** Elements ++++++++++++++++++++++++++++++++++++++++++++++++
**
*Element, Type=C3D20, Elset=Solid_part-1
1, 365, 102, 4, 95, 1491, 1308, 362, 1465, 482, 141, 98, 483, 1609, 1348, 1468,
1610, 1608, 1349, 364, 1475
2, 1491, 1308, 362, 1465, 917, 273, 8, 354, 1609, 1348, 1468, 1610, 1038, 312, 358,
1037, 1611, 1347, 363, 1469
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**
** Node sets +++++++++++++++++++++++++++++++++++++++++++++++
**
*Nset, Nset=BC_nodes
1, 2, 5, 7, 9, 10
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*Nset, Nset=Internal_Selection-1_Rigid_Body-1
3, 4, 6, 8, 95, 96
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*Nset, Nset=Internal_Selection-1_Fixed-1
1, 2, 5, 7, 9, 10
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**
** Additional node sets ++++++++++++++++++++++++++++++++++++
**
*Nset, Nset=Reference_Point-1_Ref_21171
2118
*Nset, Nset=Reference_Point-1_Rot_21172
2119

**
** Element sets ++++++++++++++++++++++++++++++++++++++++++++
**
*Elset, Elset=Internal_Selection-1_Solid_Section-1
Solid_part-1
**
** Surfaces ++++++++++++++++++++++++++++++++++++++++++++++++
**
**
** Physical constants ++++++++++++++++++++++++++++++++++++++
**
**
** Coordinate systems ++++++++++++++++++++++++++++++++++++++
**
**
** Materials +++++++++++++++++++++++++++++++++++++++++++++++
**
*Material, Name=S185
*Density
7800
*Elastic
210000000000, 0.28
*Expansion, Zero=20
1.1E-05
*Conductivity
14
*Specific heat
440
**
** Sections ++++++++++++++++++++++++++++++++++++++++++++++++
**
*Solid section, Elset=Internal_Selection-1_Solid_Section-1, Material=S185
**
** Pre-tension sections ++++++++++++++++++++++++++++++++++++
**
**
** Constraints +++++++++++++++++++++++++++++++++++++++++++++
**
*Rigid body, Nset=Internal_Selection-1_Rigid_Body-1, Ref node=2118, Rot node=2119
**
** Surface interactions ++++++++++++++++++++++++++++++++++++
**
**
** Contact pairs +++++++++++++++++++++++++++++++++++++++++++
**
**
** Amplitudes ++++++++++++++++++++++++++++++++++++++++++++++
**
**
** Initial conditions ++++++++++++++++++++++++++++++++++++++
**
**
** Steps +++++++++++++++++++++++++++++++++++++++++++++++++++
**
**
** Step-1 ++++++++++++++++++++++++++++++++++++++++++++++++++
**
*Step
*Frequency, Solver=Pardiso, Storage=Yes
10
**
** Controls ++++++++++++++++++++++++++++++++++++++++++++++++
**
**
** Output frequency ++++++++++++++++++++++++++++++++++++++++
**
**
** Boundary conditions +++++++++++++++++++++++++++++++++++++
**
*Boundary, op=New
** Name: Fixed-1
*Boundary
Internal_Selection-1_Fixed-1, 1, 6, 0
**
** Loads +++++++++++++++++++++++++++++++++++++++++++++++++++
**
**
** Defined fields ++++++++++++++++++++++++++++++++++++++++++
**
**
** History outputs +++++++++++++++++++++++++++++++++++++++++
**
*Node print, Nset=Reference_Point-1_Ref_21171, Global=Yes
U
*Node print, Nset=Reference_Point-1_Rot_21172, Global=Yes
U
**
** Field outputs +++++++++++++++++++++++++++++++++++++++++++
**
*Node file
RF, U
*El file
S, E, NOE
**
** End step ++++++++++++++++++++++++++++++++++++++++++++++++
**
*End step
