**
** Heading +++++++++++++++++++++++++++++++++++++++++++++++++
**
*Heading
Hash: tS5Opjyf, Date: 10/07/2025, Unit system: MM_TON_S_C
**
** Nodes +++++++++++++++++++++++++++++++++++++++++++++++++++
**
*Node
1, 0.00000000E+000, -3.00000000E+001, -2.00000000E+001
2, 0.00000000E+000, 3.00000000E+001, -2.00000000E+001
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**
** Elements ++++++++++++++++++++++++++++++++++++++++++++++++
**
*Element, Type=C3D20R, Elset=Solid_part-1
1, 237, 70, 4, 59, 1347, 1050, 232, 1251, 332, 89, 64, 333, 1633, 1110, 1278,
1634, 1632, 1111, 236, 1289
2, 1347, 1050, 232, 1251, 1348, 1049, 231, 1246, 1633, 1110, 1278, 1634, 1636, 1108, 1267,
1637, 1635, 1109, 235, 1279
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*Element, Type=C3D10, Elset=Solid_part-2
481, 2704, 2777, 2716, 2712, 3139, 3140, 2898, 2908, 3141, 2909
482, 2713, 2777, 2706, 2712, 3142, 3143, 2887, 2888, 3141, 2884
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*Element, Type=C3D20, Elset=Solid_part-3
799, 3502, 3395, 3349, 3384, 4092, 3895, 3497, 3996, 3547, 3404, 3389, 3548, 4228, 3925, 4023,
4229, 4227, 3926, 3501, 4034
800, 4092, 3895, 3497, 3996, 4093, 3894, 3496, 3991, 4228, 3925, 4023, 4229, 4231, 3923, 4012,
4232, 4230, 3924, 3500, 4024
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**
** Node sets +++++++++++++++++++++++++++++++++++++++++++++++
**
*Nset, Nset=Internal-1_MotorSurface
3348, 3349, 3351, 3353, 3384, 3385
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*Nset, Nset=Internal-1_BC
1, 2, 5, 7, 9, 10
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*Nset, Nset=Internal-1_Internal_Selection-1_Solid_part-1_to_Solid_part-2_Master
3, 4, 6, 8, 59, 60
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*Nset, Nset=Internal-1_Internal_Selection-1_Solid_part-1_to_Solid_part-2_Slave
2656, 2657, 2669, 2670, 2671, 2672
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*Nset, Nset=Internal-1_Internal_Selection-1_Solid_part-3_to_Solid_part-2_Master
3346, 3347, 3350, 3352, 3354, 3355
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*Nset, Nset=Internal-1_Internal_Selection-1_Solid_part-3_to_Solid_part-2_Slave
2654, 2655, 2658, 2659, 2660, 2661
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*Nset, Nset=Internal-1_TestSurface
33, 34, 35, 53, 54, 129
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**
** Additional node sets ++++++++++++++++++++++++++++++++++++
**
*Nset, Nset=MotorCenterPt_Ref_47181
4719
*Nset, Nset=MotorCenterPt_Rot_47182
4720
*Nset, Nset=BC_refpt_Ref_47201
4721
*Nset, Nset=BC_refpt_Rot_47202
4722

**
** Element sets ++++++++++++++++++++++++++++++++++++++++++++
**
*Elset, Elset=Internal_Selection-1_Solid_Section-1
Solid_part-1,
Solid_part-2,
Solid_part-3
*Elset, Elset=Internal-1_MotorSurface_S5
799, 800, 801, 802, 803, 804
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*Elset, Elset=Internal-1_BC_S3
457, 458, 459, 460, 461, 462
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*Elset, Elset=Internal-1_Internal_Selection-1_Solid_part-1_to_Solid_part-2_Master_S5
1, 2, 3, 4, 5, 6
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*Elset, Elset=Internal-1_Internal_Selection-1_Solid_part-1_to_Solid_part-2_Slave_S1
486, 511, 519, 583, 624, 671, 775, 780, 789
*Elset, Elset=Internal-1_Internal_Selection-1_Solid_part-1_to_Solid_part-2_Slave_S2
490, 533, 655, 669, 670, 704, 753
*Elset, Elset=Internal-1_Internal_Selection-1_Solid_part-1_to_Solid_part-2_Slave_S3
522, 680, 721, 731, 757
*Elset, Elset=Internal-1_Internal_Selection-1_Solid_part-1_to_Solid_part-2_Slave_S4
696, 714, 727
*Elset, Elset=Internal-1_Internal_Selection-1_Solid_part-3_to_Solid_part-2_Master_S3
1015, 1016, 1017, 1018, 1019, 1020
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*Elset, Elset=Internal-1_Internal_Selection-1_Solid_part-3_to_Solid_part-2_Slave_S2
489, 496, 513, 528, 535, 593, 606, 637, 660, 662, 767
*Elset, Elset=Internal-1_Internal_Selection-1_Solid_part-3_to_Solid_part-2_Slave_S4
547, 642
*Elset, Elset=Internal-1_Internal_Selection-1_Solid_part-3_to_Solid_part-2_Slave_S3
574, 587, 656, 703, 770, 773, 790, 797
*Elset, Elset=Internal-1_Internal_Selection-1_Solid_part-3_to_Solid_part-2_Slave_S1
580, 611, 613
*Elset, Elset=Internal-1_TestSurface_S6
357, 358, 359, 360, 381, 382, 383, 384
**
** Surfaces ++++++++++++++++++++++++++++++++++++++++++++++++
**
*Surface, Name=MotorSurface, Type=Element
Internal-1_MotorSurface_S5, S5
*Surface, Name=TestSurface, Type=Element
Internal-1_TestSurface_S6, S6
*Surface, Name=BC, Type=Element
Internal-1_BC_S3, S3
*Surface, Name=Internal_Selection-1_Solid_part-1_to_Solid_part-2_Master, Type=Element
Internal-1_Internal_Selection-1_Solid_part-1_to_Solid_part-2_Master_S5, S5
*Surface, Name=Internal_Selection-1_Solid_part-1_to_Solid_part-2_Slave, Type=Element
Internal-1_Internal_Selection-1_Solid_part-1_to_Solid_part-2_Slave_S1, S1
Internal-1_Internal_Selection-1_Solid_part-1_to_Solid_part-2_Slave_S2, S2
Internal-1_Internal_Selection-1_Solid_part-1_to_Solid_part-2_Slave_S3, S3
Internal-1_Internal_Selection-1_Solid_part-1_to_Solid_part-2_Slave_S4, S4
*Surface, Name=Internal_Selection-1_Solid_part-3_to_Solid_part-2_Master, Type=Element
Internal-1_Internal_Selection-1_Solid_part-3_to_Solid_part-2_Master_S3, S3
*Surface, Name=Internal_Selection-1_Solid_part-3_to_Solid_part-2_Slave, Type=Element
Internal-1_Internal_Selection-1_Solid_part-3_to_Solid_part-2_Slave_S2, S2
Internal-1_Internal_Selection-1_Solid_part-3_to_Solid_part-2_Slave_S4, S4
Internal-1_Internal_Selection-1_Solid_part-3_to_Solid_part-2_Slave_S3, S3
Internal-1_Internal_Selection-1_Solid_part-3_to_Solid_part-2_Slave_S1, S1
**
** Physical constants ++++++++++++++++++++++++++++++++++++++
**
**
** Coordinate systems ++++++++++++++++++++++++++++++++++++++
**
**
** Materials +++++++++++++++++++++++++++++++++++++++++++++++
**
*Material, Name=ABS
*Density
1.02E-09
*Elastic
2000, 0.394
*Expansion, Zero=20
7.4E-05
*Conductivity
0.2256
*Specific heat
1386000000
**
** Sections ++++++++++++++++++++++++++++++++++++++++++++++++
**
*Solid section, Elset=Internal_Selection-1_Solid_Section-1, Material=ABS
**
** Pre-tension sections ++++++++++++++++++++++++++++++++++++
**
**
** Constraints +++++++++++++++++++++++++++++++++++++++++++++
**
*Rigid body, Nset=Internal-1_MotorSurface, Ref node=4719, Rot node=4720
*Tie, Name=Solid_part-1_to_Solid_part-2, Position tolerance=0.01, Adjust=No
Internal_Selection-1_Solid_part-1_to_Solid_part-2_Slave, Internal_Selection-1_Solid_part-1_to_Solid_part-2_Master
*Tie, Name=Solid_part-3_to_Solid_part-2, Position tolerance=0.01, Adjust=No
Internal_Selection-1_Solid_part-3_to_Solid_part-2_Slave, Internal_Selection-1_Solid_part-3_to_Solid_part-2_Master
*Rigid body, Nset=Internal-1_BC, Ref node=4721, Rot node=4722
**
** Surface interactions ++++++++++++++++++++++++++++++++++++
**
**
** Contact pairs +++++++++++++++++++++++++++++++++++++++++++
**
**
** Amplitudes ++++++++++++++++++++++++++++++++++++++++++++++
**
**
** Initial conditions ++++++++++++++++++++++++++++++++++++++
**
**
** Steps +++++++++++++++++++++++++++++++++++++++++++++++++++
**
**
** Step-1 ++++++++++++++++++++++++++++++++++++++++++++++++++
**
*Step
*Frequency, Solver=Pardiso
15
**
** Controls ++++++++++++++++++++++++++++++++++++++++++++++++
**
**
** Output frequency ++++++++++++++++++++++++++++++++++++++++
**
**
** Boundary conditions +++++++++++++++++++++++++++++++++++++
**
*Boundary, op=New
** Name: Displacement_Rotation-1
*Boundary
4721, 1, 1, 0
4721, 2, 2, 0
4721, 3, 3, 0
4722, 1, 1, 0
4722, 2, 2, 0
4722, 3, 3, 0
**
** Loads +++++++++++++++++++++++++++++++++++++++++++++++++++
**
**
** Defined fields ++++++++++++++++++++++++++++++++++++++++++
**
**
** History outputs +++++++++++++++++++++++++++++++++++++++++
**
*Node print, Nset=MotorCenterPt_Ref_47181, Global=Yes
U
*Node print, Nset=MotorCenterPt_Rot_47182, Global=Yes
U
*Node print, Nset=BC_refpt_Ref_47201, Global=Yes
U
*Node print, Nset=BC_refpt_Rot_47202, Global=Yes
U
**
** Field outputs +++++++++++++++++++++++++++++++++++++++++++
**
*Node file
U
*El file
S, E, NOE
**
** End step ++++++++++++++++++++++++++++++++++++++++++++++++
**
*End step
** STEP - MATRIX STORAGE
*Step, Perturbation
*Frequency, Solver=MatrixStorage
*Output, Frequency=1
*Node file
RF, U
*El file
S, E, NOE
*End step
